// COMSOL Multiphysics 6.3.0.290 model "Mixed Convection.mph"
// Outline of the model tree

Parameters
  Ha = 20  // Hartmann number
  Re = 300  // Reynolds number
  Gr = 1e5  // Grashof number
  Ri = .5  // Richardson number
  phi1 = 0.01  // Solid volume fraction1
  phi2 = 0.01  // Solid volume fraction2
  rhobf = 1117.48  // Density of EG (base fluid)
  rho1 = 4250  // Density of TiO2
  rho2 = 2270  // Density of SiO2
  rhohnf = (1-phi2)*((1-phi1)*rhobf+phi1*rho1)+rho2*phi2  // Density of nano fluid
  cpbf = 2415  // Specific heat of base fluid
  cp1 = 686.2  // Specific heat of Tio2
  cp2 = 745  // Specific heat of Sio2
  rhocphnf = (1-phi2)*((1-phi1)*rhobf*cpbf+phi1*rho1*cp1)+rho2*cp2*phi2  // Specific heat of hybrid nano fluid
  betabf = 57e-5  // Thermal expansion coefficient of base fluid
  beta1 = 0.9e-5  // Thermal expansion coefficient of TiO2
  beta2 = 42.7e-5  // Thermal expansion coefficient of SiO2
  rhobetahnf = (1-phi2)*((1-phi1)*rhobf*betabf+phi1*rho1*beta1)+rho2*beta2*phi2  // Thermal Expansion density
  mubf = 0.022  // Dynamical Viscosity of Base fluid EG
  muhnf = mubf/(1-phi1)^2.5*(1-phi2)^2.5  // Dynamical Viscosity of nano fluid
  k1 = 8.9538  // Thermal condutivity of TiO2
  k2 = 1.4013  // Thermal condutivity of SiO2
  kbf = 0.2492  // Thermal condutivity of base fluid EG
  knf = kbf*(k1+(n-1)*kbf-(n-1)*phi1*(kbf-k1))/(k1+(n-1)*kbf+phi1*(kbf-k1))  // Thermal condutivity of Nano fluid
  khnf = knf*(k2+(n-1)*knf-(n-1)*phi2*(knf-k2))/(k2+(n-1)*knf+phi2*(knf-k2))  // Thermal condutivity of hybrid Nano fluid
  n = 3  // Shape factor of Nanoparticles
  alphabf = kbf/(rhobf*cpbf)  // Thermal diffusivity of base fluid
  Pr = mubf/(rhobf*alphabf)  // Prnadtl number
  p0 = 0  // Initial pressue
  alpanf = 0  // Thermal Diffusivity of nano fluid
  alphahnf = khnf/(rhocphnf)  // Thermal Diffusivity of Hybrid nano fluid
  cp = rhocphnf/(rhohnf*cpbf)  // Specific heat at constant pressure
  sigmanf = sigmabf*(((sigma2+2*sigmabf)-2*phi2*(sigmabf-sigma2))/((sigma2+2*sigmabf)+phi2*(sigmabf-sigma2)))  // electric conductivity of nanofluid
  sigmahnf = sigmanf*(((sigma1+2*sigmanf)-2*phi1*(sigmanf-sigma1))/((sigma1+2*sigmanf)+phi1*(sigmanf-sigma1)))  // electric conductivity of hybrid nanofluid
  sigmabf = 1.07e-8  // electric conductivity of base fluid EG
  sigma1 = 2.6e6  // electric conductivity of particle TiO2
  sigma2 = 3.5e6  // electric conductivity of particle SiO2
  gama = (pi/180)*45  // inclined angle
  r = .08
  omega = 15
  Rd = 5
  x1 = .5
  y1 = .7
  x2 = .5
  y2 = .3

Functions
  an1: Analytic "Upper cylinder" | funcname = u1; expr = -omega*(y-y1); args = y
  an2: Analytic "Upper_cylinder" | funcname = v1; expr = omega*(x-x1)
  an3: Analytic "Lower cylinder" | funcname = u2; expr = -omega*(y-y2); args = y
  an4: Analytic "Lowerr_cylinder" | funcname = v2; expr = omega*(x-x2)

Common definitions
  amth_ht: AmbientProperties "Ambient Thermal Properties (ht)" | Ish_amb = 0[W/m^2]

Geometry
  geom1 "Geometry 1" (2D, length unit m)
    pc1: ParametricCurve | parname = x; parmax = .5; coord = {0.02*(1-cos(2*pi*2*4*x)), x}
    pc2: ParametricCurve | parname = x; parmin = .5; coord = {1-0.02*(1-cos(2*pi*2*4*x)), x}
    b1: BezierPolygon "Bézier Polygon 1" | p = {{0, 1}, {0, 0}}; degree = 1; w = {1, 1}
    b2: BezierPolygon "Bézier Polygon 2" | p = {{0, 1}, {1, 1}}; degree = 1; w = {1, 1}
    pol1: Polygon | type = open; source = table; table = {{0, 1}, {0, 0.85}, {0, 0.5}}
    pol2: Polygon | type = open; source = table; table = {{1, 0}, {1, 0.15}, {1, 0.5}}
    csol1: ConvertToSolid | input = b1, b2, pc1, pc2, pol1, pol2
    c1: Circle | r = r; pos = {.5, 0.3}
    c2: Circle | r = r; pos = {.5, 0.7}
    dif1: Difference | input = c1, c2, csol1; input2 = c1, c2
    fin: Finalize "Form Union"

Physics
  spf: LaminarFlow on all domains
    dependent variable u = {u, v, w}
    fp1: FluidProperties (default) | rho_mat = userdef; rho = 1; mu_mat = userdef; mu = ((muhnf/mubf)*(rhobf/rhohnf))/Re
    init1: init "Initial Values 1" (default)
    wallbc1: WallBC "Wall 1" (default) | SlidingWall = 0
    inl1: InletBoundary "Inlet 1" on boundaries 3
      BoundaryCondition = Velocity
      ComponentWise = NormalInflowVelocity
      U0in = 1
      Uavfdf = Re*mubf/phobf*.5
    out1: OutletBoundary "Outlet 1" on boundaries 5 | NormalFlow = 0
    wallbc2: WallBC "Cylinder wall(1)" on boundaries 9, 10, 13, 14
      utr = {-omega*(y-y1), omega*(x-x1), 0}
      uvw = -omega*r
      SlidingWall = 0
      TranslationalVelocityOption = Manual
    wallbc3: WallBC "Cylinders wall(2)" on boundaries 7, 8, 11, 12
      utr = {-omega*(y-y2), omega*(x-x2), 0}
      uvw = omega*r
      SlidingWall = 0
      TranslationalVelocityOption = Manual
    vf1: VolumeForce on domains 1
      F = {(Ha^2/Re)*(rhobf/rhohnf)*(sigmahnf/sigmabf)*(v*sin(gama)*cos(gama)-u*(sin(gama))^2), (rhobetahnf/(rhohnf*betabf))*Ri*T+(Ha^2/Re)*(rhobf/rhohnf)*(sigmahnf/sigmabf)*(u*sin(gama)*cos(gama)-v*(cos(gama))^2), 0}
    prpc1: PressurePointConstraint on points 1, 4, 13, 16
  ht: HeatTransferInFluids on all domains
    dependent variable T
    fluid1: FluidHeatTransferModel "Fluid 1" (default)
      k_mat = userdef
      k = (alphahnf/alphabf)*(1/Re*Pr)*(1+(4*Rd/3)*(alphabf/alphahnf))
      rho_mat = userdef
      rho = 1
      Cp_mat = userdef
      Cp = 1
      u_src = root.comp1.u
      gamma_mat = userdef
      minput_velocity_src = root.comp1.u
    init1: init "Initial Values 1" (default)
    ins1: ThermalInsulation (default)
    temp1: TemperatureBoundary "Temperature 1" on boundaries 7-14 | T0 = 1
    temp2: TemperatureBoundary "Temperature 2" on boundaries 3, 5 | T0 = 0
    hf1: HeatFluxBoundary "Heat Flux 1" (disabled) on boundaries 3, 5
      HeatFluxType = ConvectiveHeatFlux
      materialType = from_mat
    hs1: HeatSource (disabled) on domains 1 | Q0 = (3/4)* Rd*( Txx+Tyy)
  poeq: PoissonEquation "Poisson's Equation" on all domains
    dependent variable u2
    EquationForm.form = Automatic
    Units.CustomSourceTermUnit = 1/s
    peq1: PoissonEquation "Poisson's Equation 1" (default) | f = spf.vorticityz
    zflx1: ZeroFluxBoundary "Zero Flux 1" (default)
    init1: init "Initial Values 1" (default)
    dir1: DirichletBoundary "Dirichlet Boundary Condition 1" on boundaries 1-6, 15, 16 | r = 0
    flux1: FluxBoundary "Flux/Source 1" on boundaries 7-14 | g = omega*r

Mesh
  mesh1 "Mesh 1" (physics-controlled)
    size: MeshSizeDefault | table = cfd; hauto = 3

Studies
  std1 "Study 1"
    param: Parametric "Parametric Sweep" (disabled) | pname = Ri; plistarr = .1 .8 5
    time: Transient "Time Dependent" (disabled) | tlist = range(0,0.5,1); usertol = on
    stat: Stationary

Solver configurations
  sol1 "Solution 1" (study std1)
    v1: Variables "Dependent Variables 1"
    s1: Stationary "Stationary Solver 1"
      fc1: FullyCoupled | linsolver = d1; initstep = 0.01; minstep = 1.0E-6; maxiter = 100
      d1: Direct "Direct, heat transfer variables (ht) (Merged)" | pivotperturb = 1.0E-13

Datasets
  dset1: Solution | solution = sol1

Derived values
  av1: AvLine "Average Nu for Upper cylinder" on boundaries 9, 10, 13, 14
    data = dset1
    table = tbl1
    expr = {ht.gradTmag*((khnf/kbf)+((4*Rd)/3)), , }
  av2: AvLine "Average Nu for lower cylinder" on boundaries 7, 8, 11, 12
    data = dset1
    table = tbl1
    expr = {, ht.gradTmag*((khnf/kbf)+((4*Rd)/3))}

Tables
  tbl1: Table
    // Line Average 1
    ht.gradTmag*((khnf/kbf)+((4*Rd)/3)) (K/m) | ht.gradTmag*((khnf/kbf)+((4*Rd)/3)) (K/m) | ht.gradTmag*((khnf/kbf)+((4*Rd)/3)) (K/m) | ht.gradTmag*((khnf/kbf)+((4*Rd)/3)) (K/m)
    11.2291 | 11.0549 | 11.091 | 10.9172

Plots
  pg1: PlotGroup2D "Velocity (spf)" | data = dset1
    surf1: Surface | expr = spf.U
    str1: Streamline | expr = {u, v}; pointtype = arrow; arrowcount = 200; arrowscale = 0.045
  pg2: PlotGroup2D "Pressure (spf)" | data = dset1
    con1: Contour | expr = p; levelrounding = off
  pg3: PlotGroup2D "Temperature (ht)" | data = dset1
    surf1: Surface | expr = T
    con1: Contour | expr = T
  pg4: PlotGroup2D "Poisson's Equation" | data = dset1
    surf1: Surface | expr = u2
  pg5: PlotGroup1D "1D Plot Group 5" | data = none
    tblp1: Table "Table Graph 1" | table = tbl1